############################################################
# Main Input
############################################################

include include/variables.in

units lj

dimension 3

boundary p p p

atom_style angle

read_data data/network.data

include include/forcefield.in

neighbor 1.0 bin

neigh_modify delay 0 every 1 check yes

include include/output.in

include include/thermo.in
