#######################################################
# SYSTEM
#######################################################

units lj
dimension 3
boundary p p p

atom_style angle

pair_style lj/cut 2.5
bond_style harmonic
angle_style harmonic

read_data ../../data/lammps/minimized.data

atom_modify sort 0 0.0
