#==============================================================
# 04_relax_gel.in
#
# Relax the crosslinked polymer gel
#
# Input :
#     crosslinked_gel.data
#
# Output:
#     relaxed_gel.data
#     relaxed_gel.restart
#
#==============================================================

clear

###############################################################
# INITIALIZATION
###############################################################

units           lj
dimension       3
boundary        p p p
atom_style      bond

include         parameters.in

###############################################################
# FORCE FIELD
###############################################################

bond_style      fene
pair_style      lj/cut 1.5

###############################################################
# READ CROSSLINKED GEL
###############################################################

read_data crosslinked_gel.data

###############################################################
# FORCE FIELD PARAMETERS
###############################################################

bond_coeff      1 ${K} ${R0} ${epsilon} ${sigma}
bond_coeff      2 ${K} ${R0} ${epsilon} ${sigma}

pair_coeff      * * ${epsilon} ${sigma} 1.5

special_bonds   fene

neighbor        ${skin} bin
neigh_modify    delay 0 every 1 check yes

comm_modify cutoff 2.5

###############################################################
# INITIAL VELOCITIES
###############################################################

velocity all create ${T} ${seed} mom yes rot yes dist gaussian

###############################################################
# THERMO OUTPUT
###############################################################

thermo 1000

thermo_style custom step temp press pe ke etotal density lx ly lz

###############################################################
# STAGE 1
# Energy Minimization
###############################################################

print " "
print "========================================="
print "Stage 1 : Energy Minimization"
print "========================================="

min_style cg

minimize 1.0e-6 1.0e-8 10000 100000

###############################################################
# STAGE 2
# Isotropic Pressure Relaxation
###############################################################

print " "
print "========================================="
print "Stage 2 : NPT Relaxation"
print "========================================="

reset_timestep 0

fix NPT all npt temp ${T} ${T} ${Tdamp} iso 0.0 0.0 1000

run 100000

unfix NPT

###############################################################
# STAGE 3
# Constant Volume Relaxation
###############################################################

print " "
print "========================================="
print "Stage 3 : NVT Relaxation"
print "========================================="

fix NVT all nvt temp ${T} ${T} ${Tdamp}

run 50000

unfix NVT

###############################################################
# SAVE RELAXED GEL
###############################################################

write_data relaxed_gel.data

write_restart relaxed_gel.restart

###############################################################
# FINISHED
###############################################################

print " "
print "========================================="
print "Gel Relaxation Complete"
print "========================================="
print "Input  : crosslinked_gel.data"
print "Output : relaxed_gel.data"
print "Restart: relaxed_gel.restart"
print "========================================="
