# ==============================================================
# Polymer Melt Energy Minimization
# ==============================================================

# ==============================================================
# Simulation Units
# ==============================================================

units           lj
log ../outputs/logs/minimize.log

# ==============================================================
# Atom Style
# ==============================================================

atom_style      bond

# ==============================================================
# Read Initial Structure
# ==============================================================

read_data       ../data/polymer_melt.data

# ==============================================================
# Bonded Interactions
# ==============================================================

bond_style      harmonic
bond_coeff      1 100.0 1.0

# ==============================================================
# Non-Bonded Interactions
# ==============================================================

pair_style      lj/cut 2.5
pair_coeff      1 1 1.0 1.0 2.5

# ==============================================================
# Neighbor List
# ==============================================================

neighbor        0.3 bin
neigh_modify    delay 0 every 1 check yes

# ==============================================================
# Special Bond Interactions
# ==============================================================

special_bonds   lj 0.0 1.0 1.0

# ==============================================================
# Thermodynamic Output
# ==============================================================

thermo          100
thermo_style    custom step pe ke etotal temp press
thermo_modify flush yes
# ==============================================================
# Energy Minimization Algorithm
# ==============================================================

min_style       cg
# ==============================================================
# Dump Atom Coordinates
# ==============================================================

dump            1 all custom 100 ../outputs/dumps/minimize.lammpstrj id type x y z
# ==============================================================
# Energy Minimization
# ==============================================================

minimize        1.0e-6 1.0e-8 1000 10000
# ==============================================================
# Save Relaxed Structure
# ==============================================================

write_data      ../data/minimized_polymer_melt.data
print "Energy minimization completed successfully."
