# ==============================================================
# Polymer Melt NPT Compression
# ==============================================================

# ==============================================================
# Log File
# ==============================================================

log             ../outputs/logs/npt.log

# ==============================================================
# Simulation Units
# ==============================================================

units           lj

# ==============================================================
# Atom Style
# ==============================================================

atom_style      bond

# ==============================================================
# Force Field
# ==============================================================

pair_style      lj/cut 2.5
bond_style      harmonic

# ==============================================================
# Read NVT Structure
# ==============================================================

read_data       ../data/nvt_polymer_melt.data

pair_coeff      1 1 1.0 1.0 2.5
bond_coeff      1 100.0 1.0

# ==============================================================
# Neighbor List
# ==============================================================

neighbor        0.3 bin
neigh_modify    delay 0 every 1 check yes

# ==============================================================
# Special Bonds
# ==============================================================

special_bonds   lj 0.0 1.0 1.0

# ==============================================================
# Thermodynamic Output
# ==============================================================

thermo          100

thermo_style    custom step temp press pe ke etotal density vol lx ly lz

thermo_modify   flush yes

# ==============================================================
# Time Step
# ==============================================================

timestep        0.005

# ==============================================================
# NPT Equilibration
# ==============================================================

fix             1 all npt temp 1.0 1.0 1.0 iso 0.0 0.0 5.0

# ==============================================================
# Dump Trajectory
# ==============================================================

dump            1 all custom 1000 ../outputs/dumps/npt.lammpstrj id type x y z

# ==============================================================
# Run
# ==============================================================

run             50000

# ==============================================================
# Save Final Configuration
# ==============================================================

write_data      ../data/npt_polymer_melt.data

# ==============================================================
# Cleanup
# ==============================================================

undump          1
unfix           1

print "NPT equilibration completed successfully."
