# ==============================================================
# Polymer Melt NVT Equilibration
# ==============================================================
#
# Author  : Abhishek Nigam
# Project : Synthetic Hydrogel in LAMMPS
#
# Description
# -----------
# Performs NVT (constant Number, Volume, Temperature)
# equilibration on the minimized polymer melt.
#
# Input :
#     minimized_polymer_melt.data
#
# Output :
#     nvt_polymer_melt.data
#     nvt.lammpstrj
#     nvt.log
#
# ==============================================================

# ==============================================================
# Log File
# ==============================================================

log             ../outputs/logs/nvt.log

# ==============================================================
# Simulation Units
# ==============================================================

units           lj

# ==============================================================
# Atom Style
# ==============================================================

atom_style      bond
# ==============================================================
# Non-Bonded Interactions
# ==============================================================

pair_style      lj/cut 2.5
# ==============================================================
# Bonded Interactions
# ==============================================================

bond_style      harmonic

# ==============================================================
# Read Minimized Structure
# ==============================================================

read_data       ../data/minimized_polymer_melt.data

pair_coeff      1 1 1.0 1.0 2.5
bond_coeff      1 100.0 1.0


# ==============================================================
# Neighbor List
# ==============================================================

neighbor        0.3 bin
neigh_modify    delay 0 every 1 check yes

# ==============================================================
# Special Bond Interactions
# ==============================================================

special_bonds   lj 0.0 1.0 1.0

# ==============================================================
# Thermodynamic Output
# ==============================================================

thermo          100
thermo_style    custom step temp pe ke etotal press density
thermo_modify   flush yes

# ==============================================================
# Initial Velocities
# ==============================================================

velocity        all create 1.0 12345 mom yes rot yes dist gaussian

# ==============================================================
# Time Integration
# ==============================================================

timestep        0.005

# ==============================================================
# NVT Thermostat
# ==============================================================

fix             1 all nvt temp 1.0 1.0 1.0

# ==============================================================
# Dump Trajectory
# ==============================================================

dump            1 all custom 1000 ../outputs/dumps/nvt.lammpstrj id type x y z

# ==============================================================
# Run Molecular Dynamics
# ==============================================================

run             50000

# ==============================================================
# Save Equilibrated Structure
# ==============================================================

write_data      ../data/nvt_polymer_melt.data

# ==============================================================
# Cleanup
# ==============================================================

undump          1
unfix           1

# ==============================================================
# Completion Message
# ==============================================================

print "NVT equilibration completed successfully."
