# ==========================================================
# Self Avoiding Walk Polymer
# Energy Minimization + NVT
# ==========================================================

log             ../outputs/logs/saw.log

units           lj
dimension       3
boundary        p p p

atom_style      bond

# ----------------------------------------------------------
# Read Polymer
# ----------------------------------------------------------

read_data       ../data/self_avoiding_walk-2.data

# ----------------------------------------------------------
# Force Field
# ----------------------------------------------------------

bond_style      fene
bond_coeff      1 30.0 1.5 1.0 1.0

pair_style      lj/cut 1.12246
pair_coeff      1 1 1.0 1.0 1.12246

special_bonds   fene

# ----------------------------------------------------------
# Neighbor List
# ----------------------------------------------------------

neighbor        0.4 bin
comm_modify cutoff 2.0
neigh_modify    every 1 delay 0 check yes

# ----------------------------------------------------------
# Output
# ----------------------------------------------------------

thermo          100

dump            1 all custom 100 ../outputs/dumps/saw.lammpstrj id mol type x y z

# ----------------------------------------------------------
# Energy Minimization
# ----------------------------------------------------------

min_style       cg

minimize        1.0e-6 1.0e-8 1000 10000

# ----------------------------------------------------------
# Initialize Temperature
# ----------------------------------------------------------

velocity all create 1.0 12345

# ----------------------------------------------------------
# NVT Equilibration
# ----------------------------------------------------------

fix             1 all nvt temp 1.0 1.0 1.0

timestep        0.005

run             10000

# ----------------------------------------------------------
# Finish
# ----------------------------------------------------------

unfix           1

write_data      ../data/self_avoiding_walk_equilibrated.data
